#include "../libdef.any"

// Find a detailed description of the model here
#include "Model/Description.any"

Main = {


  // Input Parameters. To modify at each simulation
  #include "Input/InputVariables.any"

  // Values and files to parameter the model.
  #include "Model/LoadValues.any"
  #include "Model/LoadFiles.any"


  // Function to modify the humerus head and glen to display implants


  #include "<ANYBODY_PATH_MODELUTILS>\Operations\RunAppSequence.any"
  #include "Model/BMSettings.any"

  #include "<ANYBODY_PATH_BODY>/HumanModel.any"

  HumanModel = {

    // Create a node for Bergmann's force reference
    BodyModel.Right.ShoulderArm.Seg.Humerus.gh = {
      AnyRefNode Bergmann = {
        ARel = RotMat(90*pi/180,y);
//        AnyDrawRefFrame drwref = {
//          RGB = {1,0,0};
//          ScaleXYZ = {1,1,1}/5;
//        };
      };
    };
  };


  AnyFolder Model = {

    AnyFolder &BodyModel=.HumanModel.BodyModel;

    // Definition of the model environment
    #include "Model/Environment.any"

    AnyFolder ModelEnvironmentConnection = {
      #include "Model/JointsAndDrivers.any"
    };
  };

  AnyBodyStudy Study = {
    AnyFolder &Model = .Model;


    tEnd = 8.0; // 5;
    Gravity = {0.01, -9.81, 0.01};
    nStep = 30; //19;
//    MuscleEliminationTol = 1e-6;
  }; // End of study

}; //Main
